// COMSOL Multiphysics 6.2.0.290 model "8 B1.5 Hs0.005 df0.1.mph"
// Outline of the model tree

Parameters
  seita = 1e-10[m/s]
  high = 0.15[m]
  defect = 0.01[m]
  B = 30[m]

Couplings
  intop1: Integration "积分 1" on boundaries 2 | axisym = on
  aveop1: Average "平均值 1" on boundaries 3, 4 | axisym = on

Geometry
  geom1 "几何 1" (2D axisymmetric, length unit m)
    r1: Rectangle "矩形 1" | size = {B, high}
    pt1: Point "点 1" | p = {defect, high}
    fin: Finalize "形成联合体"

Physics
  dl: PorousMediaFlowDarcy "达西定律" on all domains
    dependent variable p
    porous1: PorousMedium "多孔介质 1" (default)
      fluid1: FluidPorousMedium "流体 1" (default)
        fluidType = incompressible
        rho_mat = userdef
        rho = 1000[kg/m^3]
        rhoref_mat = userdef
        rhoref = 1000[kg/m^3]
      pm1: PorousMatrixPorousMedium "多孔基体 1" (default)
        permeabilityModelType = conductivity
        K = 2.6e-11[m/s]
        epsilon_mat = userdef
        epsilon = 0.5
    axi1: AxialSymmetry "轴对称 1" (default)
    nf1: NoFlow "无流动 1" (default)
    init1: init "初始值 1" (default)
    pr1: Pressure "压力 1" on boundaries 2
    pr2: Pressure "压力 2" on boundaries 3, 4 | p0 = 10000
    frac1: Fracture "裂隙 1" on boundaries 4 | fractureModel = conductor; df = 0.1[m]
      fluid1: FluidFracture "流体 1" (default) | rho_mat = userdef; rho = 1000[kg/m^3]
      pm1: PorousMatrixFracture "裂隙材料 1" (default)
        permeabilityModelType = conductivity
        K = seita
        epsilon_mat = userdef
        epsilon = 1

Mesh
  mesh1 "网格 1" (physics-controlled)
    size: MeshSizeDefault "大小" | hauto = 1

Studies
  std1 "研究 1"
    param: Parametric "参数化扫描" | pname = seita; plistarr = range(100e-11,100e-11,100e-10); punit = m/s
    stat: Stationary "稳态"

Solver configurations
  sol1 "解 1" (study std1)
    v1: Variables "因变量 1"
    s1: Stationary "稳态求解器 1"
      fc1: FullyCoupled "全耦合 1" | linsolver = d1; initstep = 0.01; minstep = 1.0E-6; maxiter = 50
      d1: Direct "直接，压力 (dl)" | linsolver = pardiso; pivotperturb = 1.0E-13
      p1: Parametric "参数化 1" | pname = seita; plistarr = range(100e-11,100e-11,100e-10); pcontinuationmode = no

Datasets
  dset1: Solution | solution = sol1
  rev1: Revolve2D "二维旋转" | data = dset1; startangle = -90; revangle = 225

Derived values
  int1: IntLine "线积分 1" on boundaries 2
    data = dset1
    table = tbl1
    expr = {dl.udz, , }
    unit = {m^3/s, , }
    descr = {总渗流量, , }
    intsurface = on
  pev1: EvalPoint "点计算 1" on points 1
    data = dset1
    table = new
    expr = {intop1(dl.UdZ), (aveop1(dl.H)-0[m])/0.05[m]*1e-9[m/s]*pi*1.5[m]*1.5[m]}
    unit = {m^3/s, m^3/s}
    descr = {1, 2}

Tables
  tbl1: Table "表格 1"
    // 线积分 1
    seita (m/s) | 总渗流量 (m^3/s)
    1e-09 | -1.4548e-10
    2e-09 | -2.68831e-10
    3e-09 | -3.86293e-10
    4e-09 | -5.00234e-10
    5e-09 | -6.11691e-10
    6e-09 | -7.21246e-10
    7e-09 | -8.29268e-10
    8e-09 | -9.36012e-10
    9e-09 | -1.04166e-09
    1e-08 | -1.14636e-09

Plots
  pg1: PlotGroup2D "压力 (dl)" | data = dset1; dataisaxisym = on
    surf1: Surface "表面" | expr = p
    str1: Streamline "流线 1" on boundaries 1-5 | expr = {dl.u, dl.w}; pointtype = arrow; arrowlength = logarithmic
  pg2: PlotGroup3D "压力，三维 (dl)" | data = rev1
    surf1: Surface "表面" | expr = p
  pg3: PlotGroup1D "一维绘图组 3" | data = dset1
    lngr1: LineGraph "线结果图 1" on boundaries 3, 4 | data = dset1; expr = p
  pg4: PlotGroup1D "一维绘图组 4" | data = dset1
    lngr1: LineGraph "线结果图 1" on boundaries 3, 4 | data = dset1; expr = p

Exports
  data1: Data "数据 1"
    data = dset1
    expr = p
    filename = F:\0 NBU研1\0 数据\gmb渗流 MATLAB+comsol\fig\er\er h数据图\h\comsol.csv
    location = grid
    gridx2 = range(0,0.15,3)
    gridy2 = 0.6